// COMSOL Multiphysics 6.4.0.293 model "Hourglass.mph"
// Outline of the model tree

Parameters
  d_sand = 1[mm]  // 沙粒直径
  r_bottom = 5[mm]  // 沙漏底面半径
  r_top = 5[cm]  // 沙漏顶面半径
  height = 1[dm]  // 沙漏高度
  eg = 60[MPa]  // 杨氏模量

Geometry
  geom1 "几何 1" (3D, length unit cm)
    cone1: Cone "圆锥体 1" | r = r_bottom; h = height; specifytop = radius; rtop = r_top
    fin: Finalize "形成联合体"
  pgeom_gran "几何" (1D, length unit m)
    pt1: Point "点 1"

Materials
  mat1: Common "Corning 0080 [measured in air,measured at 589.3 nm]" on all boundaries
    def: def "基本"
      youngsmodulus = 2.5*eg
      poissonsratio = 0.21
    RefractiveIndex: RefractiveIndex "折射率"
      n = 1.512
      ki = 0
  mat2: Common "Ottawa C-109 sand [solid]" on all domains
    def: def "基本"
      density = 2650[kg/m^3]
      youngsmodulus = eg
      poissonsratio = 0.2

Physics
  gran: GranularFlow "颗粒流" on all domains
    dependent variable q = {qx, qy, qz}
    gp1: GrainProperties "团粒属性 1" | GranularMaterial = mat2; dg = d_sand
    wp1: WallProperties "壁 1" (default)
      facc1: BoundaryForceAccumulator "力累加器 1" on all boundaries
    cbg1: ContactBetweenGrains "团粒间接触 1" | mus = 0; mur = 0; mutw = 0
    cww1: ContactWithWalls "壁接触 1" | mus = 0; mur = 0; mutw = 0
    gf1: GravityForce "重力 1"
    inl1: GrainInlet "入口 1" on boundaries 3 | rt = 0.1; v0 = {0, 0, 0}; NumGrains = 10
    out1: Outlet "出口 1" on boundaries 4 | WallCondition = Disappear

Mesh
  mesh1 "网格 1" (physics-controlled)

Studies
  std1 "研究 1"
    time: Transient "瞬态" | tlist = range(0,0.1,1)

Solver configurations
  sol1 "解 1" (study std1)
    v1: Variables "因变量 1"
    t1: Time "瞬态求解器 1"
      dDef: Direct "直接"
      fc1: FullyCoupled "全耦合 1"

Datasets
  dset1: Solution | solution = sol1
  gran1: Grain "团粒 1"
    solution = sol1
    pgeomspec = fromphysics
    pgeom = pgeom_gran
    posdof = {comp1.qx, comp1.qy, comp1.qz}
    physicsinterface = gran

Plots
  pg1: PlotGroup3D "团粒位置 (gran)" | data = gran1
    gtrj1: GrainTrajectories "团粒位置 1" | linetype = none; pointtype = point; pointradiusexpr = gran.rg
      col1: Color "颜色表达式 1" | expr = gran.V

Exports
  anim1: Animation "动画 1" | movietype = avi; giffilename = D:\Codes\Simulations\Hourglass\Comsol\Hourglass.gif
  anim2: Animation "动画 2" | target = player